# Analyse der Wechselwirkungen von Arraystrukturen
# array.mcd - Abschnitt 4.4
# Eingabedaten:
c_zelle := 1  # Federkonstante Einzelzelle
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c_steg := 100  # Federkonstante Steggitter
c_zelle1 := 1.6  # Federkonstante Zelle rechts
m_zelle := 5  # Masse Einzelzelle
m_steg := 50  # Masse Steggitter
dr_zelle := 0.05  # Dämpfungsmaß Zelle
dr_steg := 0.1  # Dämpfungsmaß Steggitter
# Eigenwerte ohne Koppeleffekte (starre Rahmeneinspannung):
λ_zelle := 2*c_zelle/m_zelle
λ_zelle =  # no stored result
λ_steg := c_steg/m_steg
λ_steg =  # no stored result  # Eigenwerte (omega**2)
λ_zelle1 := 2*c_zelle1/m_zelle
λ_zelle1 =  # no stored result  # toleranzbehaftete Zelle
# Systemmatrizen:
K := [
    c_steg + c_zelle, -c_zelle, 0, 0, 0, 0, 0;
    -c_zelle, 2*c_zelle, -c_zelle, 0, 0, 0, 0;
    0, -c_zelle, c_steg + 2*c_zelle, -c_zelle, 0, 0, 0;
    0, 0, -c_zelle, 2*c_zelle, -c_zelle, 0, 0;
    0, 0, 0, -c_zelle, c_steg + c_zelle + c_zelle1, -c_zelle1, 0;
    0, 0, 0, 0, -c_zelle1, 2*c_zelle1, -c_zelle1;
    0, 0, 0, 0, 0, -c_zelle1, c_steg + c_zelle1
]
M := [
    m_steg, 0, 0, 0, 0, 0, 0;
    0, m_zelle, 0, 0, 0, 0, 0;
    0, 0, m_steg, 0, 0, 0, 0;
    0, 0, 0, m_zelle, 0, 0, 0;
    0, 0, 0, 0, m_steg, 0, 0;
    0, 0, 0, 0, 0, m_zelle, 0;
    0, 0, 0, 0, 0, 0, m_steg
]
# Eigenwerte mit Koppeleffekte berechnen (flexibler Rahmen):
omega := genvals(K, M)
vektoren := genvecs(K, M)
# Normierung der Eigenvektoren auf X*M*X=1:
vektor_1 := vektoren[:, 0]/sqrt(|transpose(vektoren[:, 0])*M*vektoren[:, 0]|)
vektor_2 := vektoren[:, 1]/sqrt(|transpose(vektoren[:, 1])*M*vektoren[:, 1]|)
vektor_3 := vektoren[:, 2]/sqrt(|transpose(vektoren[:, 2])*M*vektoren[:, 2]|)
vektor_4 := vektoren[:, 3]/sqrt(|transpose(vektoren[:, 3])*M*vektoren[:, 3]|)
vektor_5 := vektoren[:, 4]/sqrt(|transpose(vektoren[:, 4])*M*vektoren[:, 4]|)
vektor_6 := vektoren[:, 5]/sqrt(|transpose(vektoren[:, 5])*M*vektoren[:, 5]|)
vektor_7 := vektoren[:, 6]/sqrt(|transpose(vektoren[:, 6])*M*vektoren[:, 6]|)
# Darstellung der Eigenvektoren:
i := 1 .. 7
# 1. Eigenvektor | 2. Eigenvektor | 3. Eigenvektor
omega[1] =  # no stored result
omega[0] =  # no stored result
omega[2] =  # no stored result
# [plot: vektor_2[i - 1, 0] vs i]
# [plot: vektor_1[i - 1, 0] vs i]
# [plot: vektor_3[i - 1, 0] vs i]
# 4. Eigenvektor | 5. Eigenvektor | 6. Eigenvektor
omega[3] =  # no stored result
omega[6] =  # no stored result
# [plot: vektor_4[i - 1, 0] vs i]
# [plot: vektor_7[i - 1, 0] vs i]
omega[5] =  # no stored result
# [plot: vektor_6[i - 1, 0] vs i]
# [plot: vektor_5[i - 1, 0] vs i]
# 7. Eigenvektor
omega[4] =  # no stored result
# Berechnung der Frequenzgänge nach der Methode der modalen Superposition:
# (Abschnitt 5.9.4)
w := 0.01, 0.015 .. 2  # Frequenzbereich
m1 := 1
m2 := 1
m3 := 1
m4 := 1
m5 := 1
m6 := 1
m7 := 1
k1 := omega[0]
k2 := omega[1]
k3 := omega[2]
k4 := omega[3]
k5 := omega[4]
k6 := omega[5]
k7 := omega[6]
c1 := 2*dr_zelle*sqrt(omega[0])
c2 := 2*dr_zelle*sqrt(omega[1])
c3 := 2*dr_zelle*sqrt(omega[2])
c4 := 2*dr_steg*sqrt(omega[3])
c5 := 2*dr_steg*sqrt(omega[4])
c6 := 2*dr_steg*sqrt(omega[5])
c7 := 2*dr_steg*sqrt(omega[6])
# Realteil und Imaginärteil des Lastvektors (Erregung am Punkt 4)
FR := [0; 0; 0; 1 + 1i*0; 0; 0; 0]
# Modale Transformation der Lastvektoren:
fr1 := transpose(vektor_1)*FR
fr1 =  # no stored result
fr5 := transpose(vektor_5)*FR
fr5 =  # no stored result
fr2 := transpose(vektor_2)*FR
fr2 =  # no stored result
fr6 := transpose(vektor_6)*FR
fr6 =  # no stored result
fr3 := transpose(vektor_3)*FR
fr3 =  # no stored result
fr7 := transpose(vektor_7)*FR
fr7 =  # no stored result
fr4 := transpose(vektor_4)*FR
fr4 =  # no stored result
# Frequenzgänge der Schwingmoden:
w0 := λ_zelle
S1(w) := (k1 - w^2*m1) + 1i*(c1*w)
U1(w) := fr1/S1(w)
U1(w0) =  # no stored result
S2(w) := (k2 - w^2*m2) + 1i*(c2*w)
U2(w) := fr2/S2(w)
U2(w0) =  # no stored result
S3(w) := (k3 - w^2*m3) + 1i*(c3*w)
U3(w) := fr3/S3(w)
U3(w0) =  # no stored result
S4(w) := (k4 - w^2*m4) + 1i*(c4*w)
U4(w) := fr4/S4(w)
U4(w0) =  # no stored result
S5(w) := (k5 - w^2*m5) + 1i*(c5*w)
U5(w) := fr5/S5(w)
U5(w0) =  # no stored result
S6(w) := (k6 - w^2*m6) + 1i*(c6*w)
U6(w) := fr6/S6(w)
U6(w0) =  # no stored result
S7(w) := (k7 - w^2*m7) + 1i*(c7*w)
U7(w) := fr7/S7(w)
U7(w0) =  # no stored result
# Rücktransformation der Auslenkungen:
UR1(w) := vektor_1*U1(w)
UR2(w) := vektor_2*U2(w)
UR3(w) := vektor_3*U3(w)
UR4(w) := vektor_4*U4(w)
UR5(w) := vektor_5*U5(w)
UR6(w) := vektor_6*U6(w)
UR7(w) := vektor_7*U7(w)
# Modale Superposition:
UR(w) := UR1(w) + UR2(w) + UR3(w) + UR4(w) + UR5(w) + UR6(w) + UR7(w)
# Berechnung der Amplituden charakteristischer Punkte:
ampl_e(w) := sqrt(Re(UR(w)[3])^2 + Im(UR(w)[3])^2)  # Erregerpunkt (Punkt 4)
ampl_s(w) := sqrt(Re(UR(w)[4])^2 + Im(UR(w)[4])^2)  # Steggitter (Punkt 5)
ampl_n(w) := sqrt(Re(UR(w)[5])^2 + Im(UR(w)[5])^2)  # Nachbarzelle (Punkt 6)
# Erregerpunkt | Steggitter
# [plot: ampl_e(w) vs w]
# [plot: ampl_s(w) vs w]
# logarithmische Darstellung
# alle Kennlinien
# Nachbarzelle
# [plot: ampl_n(w) vs w]
# [plot: ampl_e(w), ampl_s(w), ampl_n(w) vs w]
