# Berechnung der maximalen Auslenkung einer elektrostatisch erregten Drehplatte
# dreh_ext.mcd - Abschnitt 7.3.2
# Eingabedaten:
PL_B := 0.001
PL_L := 0.001  # Plattenlänge und -breite
C_TOR := 0.1*10^-6  # Torsionssteifigkeit
ε := 8.85*10^-12  # Dielektrizitätskonstante
D_ELE := 50*10^-6  # Elektrodengrundabstand
# Startwerte:
# Wenn die folgende find-Funktion keine Lösung findet, sind die Startwerte zu verändern. Bei Konvergenzproblemen sollten die Eingangdaten nur allmählich geändert werden.
U := 10  # Elektrodenspannung
α := -0.01  # Ablenkwinkel in rad
# resultierende Momenten-
# funktion
M(α, U) := U^2*ε*PL_L/(2*sin(α)^2)*(ln(PL_B*sin(α)/(2*D_ELE) + 1) - PL_B*sin(α)/(2*D_ELE)/(PL_B*sin(α)/(2*D_ELE) + 1)) + C_TOR*α
solve block
    # Gleichungssystem
    # für Extremwert
    M(α, U) == 0
    d/dα(M(α, U)) == 0
    lös := Find(α, U)
end solve block
lös =  # no stored result  # Lösungsvektor
UZ_MAX := 0.5*PL_B*sin(lös[0])  # maximale Auslenkung der Spiegelkante
UZ_MAX =  # no stored result
# Verhältnis Auslenkung zu Elektrodenabstand in %
|UZ_MAX/D_ELE*100| =  # no stored result
# Grafische Darstellung der resultierenden Momentenfunktion:
x := -0.99*sin(D_ELE/(0.5*PL_B)), -0.98*sin(D_ELE/(0.5*PL_B)) .. 0.99*sin(D_ELE/(0.5*PL_B))  # Wertebereich
# [plot: M(x, lös[1]) vs x]
