# Frequenzganganalyse eines Torsionsaktuators
# harmonic.mcd - Beispiel 5.12
# Eingabedaten:
e_mod := 169*10^9  # E_Modul
# Trapezförmige Feder mit 30 µm Höhe und 30 µm Breite (kleine Seite). Die Länge beträgt 1700 µm.
# Die Spiegelpatte ist 4000 x 4000 µm, die Platten-
# dicke ebenfalls 30 µm.
dens := 2329  # Dichte
iyy := 1.08*10^-19  # Flächenträgheitsmoment
git := 1.47*10^-8  # Torsionssteifigkeit
m_la := 0.004  # Plattenlänge
h := 30*10^-6  # Plattendicke; Federdicke
l := 1700*10^-6  # Federlänge
u_ele := 100  # Elektrodenspannung
d_ele := 300*10^-6  # Elektrodengrundabstand
d1 := 0.02  # Dämpfungsmaß translatorisch
d2 := 0.01  # Dämpfungsmaß rotatorisch
# Folgegrößen:
EI := e_mod*iyy  # Biegesteifigkeit
m := m_la^2*h*dens  # Masse
J := m/12*(m_la^2 + h^2)  # Massenträgheitsmoment
# Variante 1:
# Der Torsionsaktuator wird mit zwei Freiheitsgraden modelliert, der Translation und der Rotation in Plattenmitte. Die Bewegung im Elektrodenschwerpunkt soll nach
# Uz(rechts)=Uz(Mitte)+ROTy(Mitte) * m_la / 4
# Uz(links)=Uz(Mitte)-ROTy(Mitte) * m_la / 4
# berechnet werden.
K_Trans := 24*EI/l^3
K_Rot := 2*git/l  # Steifigkeit translatorisch und rotatorisch
K := [K_Trans, 0; 0, K_Rot]
M := [m, 0; 0, J]  # Steifigkeits- und Massenmatrix
omega := genvals(K, M)
vektoren := genvecs(K, M)  # Eigenwerte
# rotatorische Bewegung | translatorische Bewegung
Ω1 := sqrt(omega[1])
Ω2 := sqrt(omega[0])
Ω1 =  # no stored result
Ω2 =  # no stored result  # Eigenkreisfrequenzen
# Berechnung der Dämpfungsmatrix: | alpha-beta-Dämpfung nach Rayleigh (Tafel 5.20)
alpha_beta := [1/(2*Ω1), Ω1/2; 1/(2*Ω2), Ω2/2]^-1*[d2; d1]
C := alpha_beta[0]*M + alpha_beta[1]*K
C =  # no stored result
# Alternative Berechnung für entkoppelte Systeme zum Vergleich:
C1 := d1*2*sqrt(K_Trans*m)
C1 =  # no stored result
C2 := d2*2*sqrt(K_Rot*J)
C2 =  # no stored result
# Frequenzbereich:
w := 1, 100 .. 10000  # Berechnung für alle Frequenzen von 1 bis 10 kHz (Intervall 100 Hz)
# dynamische Steifigkeitsmatrix
S(w) := [
    K[0, 0] - w*w*M[0, 0], K[0, 1] - w*w*M[0, 1], -C[0, 0]*w, -C[0, 1]*w;
    K[1, 0] - w*w*M[1, 0], K[1, 1] - w*w*M[1, 1], -C[1, 0]*w, -C[1, 1]*w;
    C[0, 0]*w, C[0, 1]*w, K[0, 0] - w*w*M[0, 0], K[0, 1] - w*w*M[0, 1];
    C[1, 0]*w, C[1, 1]*w, K[1, 0] - w*w*M[1, 0], K[1, 1] - w*w*M[1, 1]
]
F_Trans := 0.5*m_la^2*8.85*10^-12*u_ele^2/(2*d_ele^2)
F_Trans =  # no stored result  # elektrostatische Kraft
M_Rot := F_Trans*m_la/4
M_Rot =  # no stored result  # elektrostatisches Moment
# komplexer Lastvektor
F := [F_Trans; M_Rot; 0; 0]
U(w) := S(w)^-1*F
# komplexer Verschiebungs-
# vektor
U_Trans_Ampl(w) := sqrt(U(w)[0]^2 + U(w)[2]^2)
U_Rot_Ampl(w) := sqrt(U(w)[1]^2 + U(w)[3]^2)
# Vergleich der Resonanz-
# überhöhung (zur Kontrolle)
V_Trans_max := U_Trans_Ampl(Ω2)/U_Trans_Ampl(0)
V_Rot_max := U_Rot_Ampl(Ω1)/U_Rot_Ampl(0)
1/(2*d1) =  # no stored result
V_Rot_max =  # no stored result
1/(2*d2) =  # no stored result  # Sollwerte
V_Trans_max =  # no stored result
# Vergrößerungsfunktion für den translatorischen und rotatorischen Freiheitsgrad:
# [plot: U_Trans_Ampl(w)/U_Trans_Ampl(0) vs w]
# [plot: U_Rot_Ampl(w)/U_Rot_Ampl(0) vs w]
# Berechnung der Kennwerte für die Schwerpunkte der beiden Plattenhälften:
# Die Verschiebungskomponenten müssen komplex addiert werden (Zeigergrößen)!
U_Rechts_Real(w) := U(w)[0] + U(w)[1]*m_la/4
U_Links_Real(w) := U(w)[0] - U(w)[1]*m_la/4
U_Rechts_Imag(w) := U(w)[2] + U(w)[3]*m_la/4
U_Links_Imag(w) := U(w)[2] - U(w)[3]*m_la/4
U_Rechts_Ampl(w) := sqrt(U_Rechts_Real(w)^2 + U_Rechts_Imag(w)^2)
# if-Anweisung, da atan nur von
# -90 bis 90 Grad definiert ist
U_Links_Ampl(w) := sqrt(U_Links_Real(w)^2 + U_Links_Imag(w)^2)
phi_Rechts(w) := if(U_Rechts_Real(w) < 0, atan(U_Rechts_Imag(w)/U_Rechts_Real(w)) - π, atan(U_Rechts_Imag(w)/U_Rechts_Real(w)))*360/(2*π)
phi_Links(w) := if(U_Links_Real(w) < 0, atan(U_Links_Imag(w)/U_Links_Real(w)) - π, atan(U_Links_Imag(w)/U_Links_Real(w)))*360/(2*π)
phi_Links(w) := if(phi_Links(w) > (-180), phi_Links(w) - 360, phi_Links(w)) + 360
# Vergrößerungsfunktion: | Phasengang:
# [plot: U_Rechts_Ampl(w)/U_Rechts_Ampl(0), U_Links_Ampl(w)/U_Links_Ampl(0) vs w]
# [plot: phi_Rechts(w), phi_Links(w) vs w]
# Bodediagramm:
w := 10, 500 .. 200000
# [plot: U_Rechts_Ampl(w)/U_Rechts_Ampl(1), U_Links_Ampl(w)/U_Links_Ampl(1) vs w]
# Eigenfrequenzen bei:
Ω1/(2*π) =  # no stored result
Ω2/(2*π) =  # no stored result
# Tilgung am Erregerpunkt bei:
# (geringe Auslenkung)
# Schwingfrequenz, wenn
# am Tilgungspunkt ein Lager wäre.
1/(2*π)*sqrt((2*git/l + 3*EI*m_la^2/(2*l^3))/(J + m*m_la^2/16)) =  # no stored result
# Ortskurve:
w := 1, 5 .. 10000
# [plot: U_Rechts_Imag(w)/U_Rechts_Real(1), U_Links_Imag(w)/U_Links_Real(1) vs U_Rechts_Real(w)/U_Rechts_Real(1), U_Links_Real(w)/U_Links_Real(1)]
# Variante 2:
# Der Torsionsaktuator wird mit zwei translatorischen Freiheitsgraden modelliert, die sich in der Mitte der Spiegelhälften befinden.
# Die Bewegung in der Plattenmitte ergibt sich nach
# Uz(Mitte)=0,5*(Uz(rechts)+Uz(links))
# ROTy(Mittet)=(Uz(rechts)-Uz(links))/0,5*l.
u1(F1, F2) := l^3/(24*EI)*(F1 + F2) + l/(git*2)*(F1 - F2)*(m_la/4)^2  # Verschiebungsansatz nach Castigliano
u2(F1, F2) := l^3/(24*EI)*(F1 + F2) + l/(git*2)*(F2 - F1)*(m_la/4)^2
K_INV := [
    l^3/(24*EI) + l*m_la^2/(32*git), l^3/(24*EI) - l*m_la^2/(32*git);
    l^3/(24*EI) - l*m_la^2/(32*git), l^3/(24*EI) + l*m_la^2/(32*git)
]
K2 := K_INV^-1
K2 =  # no stored result
# Vergleich der statischen Auslenkung für F1=F_Trans und F2=0:
F := [F_Trans; 0]
U_Rechts_Ampl(0) =  # no stored result
K2^-1*F =  # no stored result
U_Links_Ampl(0) =  # no stored result
phi_Links(0) =  # no stored result
# Vollständige Massenmatrix:
# Kräftevergleich bei gleichgerichteter und entgegengerichte Bewegung.
M_fak := [1, 1; 1, -1]^-1*[0.5; 2/3]*m
M2 := [M_fak[0], M_fak[1]; M_fak[1], M_fak[0]]
M2 =  # no stored result
omega_ver := genvals(K2, M2)
# Vergleich der Eigenwerte
sqrt(omega_ver[1]) =  # no stored result
Ω1 =  # no stored result
sqrt(omega_ver[0]) =  # no stored result
Ω2 =  # no stored result
# Dämpfungsmatrix:
C2 := alpha_beta[0]*M2 + alpha_beta[1]*K2
alpha_beta := [1/(2*omega_ver[1]^0.5), 0.5*omega_ver[1]^0.5; 1/(2*omega_ver[0]^0.5), 0.5*omega_ver[0]^0.5]^-1*[d2; d1]
C2 =  # no stored result
# Frequenzganganalyse:
w := 1, 10 .. 10000
K := K2
M := M2
C := C2
S2(w) := [
    K[0, 0] - w*w*M[0, 0], K[0, 1] - w*w*M[0, 1], -C[0, 0]*w, -C[0, 1]*w;
    K[1, 0] - w*w*M[1, 0], K[1, 1] - w*w*M[1, 1], -C[1, 0]*w, -C[1, 1]*w;
    C[0, 0]*w, C[0, 1]*w, K[0, 0] - w*w*M[0, 0], K[0, 1] - w*w*M[0, 1];
    C[1, 0]*w, C[1, 1]*w, K[1, 0] - w*w*M[1, 0], K[1, 1] - w*w*M[1, 1]
]
F := [F_Trans; 0; 0; 0]
U2(w) := S2(w)^-1*F
U2_Rechts_Ampl(w) := sqrt(U2(w)[0]^2 + U2(w)[2]^2)
U2_Links_Ampl(w) := sqrt(U2(w)[1]^2 + U2(w)[3]^2)
# Vergleich der Vergrößerungsfunktionen beider Modelle:
# [plot: U_Rechts_Ampl(w)/U_Rechts_Ampl(0), U_Links_Ampl(w)/U_Links_Ampl(0) vs w]
# [plot: U2_Rechts_Ampl(w)/U2_Rechts_Ampl(0), U2_Links_Ampl(w)/U2_Links_Ampl(0) vs w]
