# Transient Bewegungsanalyse nach Newmark
# newmark.mcd - Abschnitt 5.9.3
# Eingabedaten:
M := 1
K := 40
ξ := 0.1  # Masse; Federkonstante; Dämpfungsmaß
anz_per := 10
anz_st := 20  # Anzahl der Perioden; Anzahl der Stützstellen je Periode
# Amplitudenverringerungsfaktor
# amplitude decay factor  in ANSYS
γ := 0.005
u_0 := 0
v_0 := 0
a_0 := 0  # Anfangswerte für Auslenkung, Geschwindigkeit und Beschleunigung
F(t) := 10*(1 - e^(-2*t))
# Lastfunktion
f := 1/(2*π)*sqrt(K/M)
f =  # no stored result  # Eigenfrequenz
T := 1/f
T =  # no stored result  # Periodendauer
D := 2*ξ*sqrt(K*M)
D =  # no stored result  # Dämpfungskonstante
time_e := anz_per*T
time_e =  # no stored result  # Endzeit der Analyse
dt := T/anz_st
dt =  # no stored result  # Schrittweite
i := 0, 1 .. anz_per*anz_st  # Laufvariable
# Lastfunktion: | Newmarkparameter:
# [plot: F(i*dt) vs i*dt]
α := 1/4*(1 + γ)^2
α =  # no stored result
δ := 1/2 + γ
δ =  # no stored result
a0 := 1/(α*dt^2)
a1 := δ/(α*dt)
a2 := 1/(α*dt)
a3 := 1/(2*α) - 1
a4 := δ/α - 1
a5 := dt/2*(δ/α - 2)
a6 := dt*(1 - δ)
a7 := δ*dt
# Anfangswerte:
[u[0]; vel[0]; acel[0]] := [u_0; v_0; a_0]
# Integrationsvorschrift:
[u[i + 1]; vel[i + 1]; acel[i + 1]] := [
    (F((i + 1)*dt) + M*(a0*u[i] + a2*vel[i] + a3*acel[i]) + D*(a1*u[i] + a4*vel[i] + a5*acel[i]))/(a0*M + a1*D + K);
    vel[i] + a6*acel[i] + a7*(a0*((F((i + 1)*dt) + M*(a0*u[i] + a2*vel[i] + a3*acel[i]) + D*(a1*u[i] + a4*vel[i] + a5*acel[i]))/(a0*M + a1*D + K) - u[i]) - a2*vel[i] - a3*acel[i]);
    a0*((F((i + 1)*dt) + M*(a0*u[i] + a2*vel[i] + a3*acel[i]) + D*(a1*u[i] + a4*vel[i] + a5*acel[i]))/(a0*M + a1*D + K) - u[i]) - a2*vel[i] - a3*acel[i]
]
# Bewegungsfunktionen:
# [plot: u[i] vs i*dt]
# [plot: vel[i] vs i*dt]
# [plot: acel[i] vs i*dt]
# Analytische Vergleichslösung:
w := sqrt((K/M))
t := 0.01, 0.02 .. time_e
y(t) := integral(F(x)/(M*w)*e^(-ξ*w*(t - x))*sin(w*(t - x)), x = 0 .. t)
# [plot: y(t), u[i] vs t, i*dt]
