# Squeezed Film Dämpfung von Rechteckplatten bei harmonischer Erregung
# squeeze.mcd - Abschnitt 7.1.3
# Eingabedaten:
PL_K := 0.00178  # Plattenlänge (kleine Seite)
PL_G := 0.003  # Plattenbreite (große Seite)
K := 180  # Federsteifigkeit
M := 4.9*10^-6  # Masse der Platte
ABS := 4*10^-6  # Luftspaltdicke
DR := 3000  # Luftdruck
F_O := 10000  # Frequenzbereich (obere Grenze)
ACEL := 0.5*9.81  # Beschleunigung
# Berechnungsteil:
Ω(f) := 2*π*f
# Kreisfrequenz
η_eff := 18.3*10^-6/(1 + 9.638*(100000/DR*66*10^-9/ABS)^1.159)
η_eff =  # no stored result  # effektive Viskosität
# Squeeze-Zahl
σ(f) := 12*η_eff*PL_K^2*Ω(f)/(DR*ABS^2)
f_c := π*DR*ABS^2/(24*η_eff)*(1/PL_K^2 + 1/PL_G^2)
f_c =  # no stored result  # Cut-Off-Frequenz
# Reibungsbedingter Dämpfungskoeffizient:
D(f) := 64*σ(f)*DR*PL_K*PL_G/(π^6*ABS*Ω(f))*sum(sum(((m*2 - 1)^2 + (n*2 - 1)^2*(PL_K/PL_G)^2)/((m*2 - 1)^2*(n*2 - 1)^2*(((m*2 - 1)^2 + (n*2 - 1)^2*(PL_K/PL_G)^2)^2 + σ(f)^2/π^4)), n = 1 .. 3), m = 1 .. 3)
# Kompressionsbedinge Federsteifigkeit:
KS(f) := 64*σ(f)^2*DR*PL_K*PL_G/(π^8*ABS)*sum(sum(1/((m*2 - 1)^2*(n*2 - 1)^2*(((m*2 - 1)^2 + (n*2 - 1)^2*(PL_K/PL_G)^2)^2 + σ(f)^2/π^4)), n = 1 .. 3), m = 1 .. 3)
K_GES(f) := K + KS(f)
# Gesamtsteifigkeit
ζ(f) := D(f)/(2*sqrt(K_GES(f)*M))
ζ(1000) =  # no stored result
# Dämpfungsmaß
# Last
F := ACEL*M
F =  # no stored result
# dynamische
# Steifigkeitsmatrix
# Lastvektor
S_SYS(f) := [K_GES(f) - Ω(f)^2*M, -Ω(f)*D(f); Ω(f)*D(f), K_GES(f) - Ω(f)^2*M]
LAST := [F; 0]
VER(f) := S_SYS(f)^-1*LAST
# Verschiebungsvektor
AMPL(f) := sqrt(VER(f)[0]^2 + VER(f)[1]^2)  # Amplitude
PHI(f) := if(VER(f)[0] < 0, atan(VER(f)[1]/VER(f)[0]) - π, atan(VER(f)[1]/VER(f)[0]))*360/(2*π)  # Phasenwinkel
f := 10, F_O/100 .. F_O
# Amplituden- und Phasengang:
# [plot: AMPL(f) vs f]
# [plot: PHI(f) vs f]
# Dämpfungsmaß, Dämpfungskraft und Squeezekraft:
# [plot: ζ(f) vs f]
F_D(f) := Ω(f)*D(f)*[-VER(f)[1]; VER(f)[0]]
FD_AMPL(f) := sqrt(F_D(f)[0]^2 + F_D(f)[1]^2)
F_S(f) := KS(f)*VER(f)
FS_AMPL(f) := sqrt(F_S(f)[0]^2 + F_S(f)[1]^2)
# [plot: FD_AMPL(f)/AMPL(f) vs f]
# [plot: FS_AMPL(f)/AMPL(f) vs f]
