# Worksheet setting: ORIGIN = 1
# Berechnung der Weibull-Parameter einer gegebenen Stichprobe
# weibull.mcd - Beispiel 5.7
# Eingabedaten:
anz := 7  # Anzahl der Messintervalle
# sigma ... Messintervall
# daten ... ausgefallenen Probanten im jeweiligen Messintervall
sigma := [
    772.5*10^6, 827.5*10^6;
    827.5*10^6, 882.5*10^6;
    882.5*10^6, 937.5*10^6;
    937.5*10^6, 992.5*10^6;
    992.5*10^6, 1047.5*10^6;
    1047.5*10^6, 1102.5*10^6;
    1102.5*10^6, 1157.5*10^6
]
daten := [3; 3; 4; 4; 6; 7; 2]
# Berechnungsteil:
# benutzte Stützstellen
i := 1 .. anz - 1
ggs := sum(daten[i], i = 1 .. anz)
ggs =  # no stored result  # Grundgesamtheit
# Zuverlässigkeitsfunktion  Ordinaten- und Abszissenwerte des Weibull-Papiers
R[i] := (ggs - sum(daten[j], j = 1 .. i))/ggs
Y[i] := log(log(1/R[i]))
X[i] := log(sigma[i, 2])  # Ende des Messintervalls
R =  # no stored result
Y =  # no stored result
X =  # no stored result
# Weibull-Kennwerte:
β := slope(X, Y)
β =  # no stored result  # berechneter Weibull-Parameter
null := intercept(X, Y)
reg[i] := β*X[i] + null  # Regressionsgerade
η := 10^((-0.362 - null)/β)
η =  # no stored result  # charakteristische Lebensdauer
# Weibull-Papier:
# [plot: Y[i], reg[i] vs X[i]]
# B-Lebensdauer:
# B_10-Lebensdauer
# Lebensdauer bei der 10% bzw. 1%
# der Grundgesamtheit ausgefallen sind.
η*(-ln(0.9))^(1/β) =  # no stored result
# B_0.1-Lebensdauer
η*(-ln(0.999))^(1/β) =  # no stored result
# Darstellung der Wahrscheinlichkeitsdichtefunktion und der Messwerte:
f(σ) := β*σ^(β - 1)/η^β*e^(-(σ/η)^β)
σ := 500*10^6, 505*10^6 .. 1500*10^6
j := 1 .. anz + 2
a[j] := (sigma[1, 1] + sigma[1, 2])/2 + (j - 2)*(-sigma[1, 1] + sigma[1, 2])
v[1] := 0
daten := stack(v, daten)
daten := stack(daten, v)
# [plot: f(σ), daten[j]/(1.6*10^9) vs σ, a[j]]
